""" 用于为Contact Selection的2D模拟, 场景是切割前的预拉伸, 使用两个接触点
用于检验contact selection是否最优
Sofa 环境似乎不能承受大拉伸, 难以变形到期望距离
created at 2025-03-11 by hsy
"""
import Sofa
import SofaRuntime
import Sofa.Gui
import Sofa.SofaGL
import os, sys, glob
import argparse
from typing import List, Dict, DefaultDict, Tuple
import numpy as np
import numpy.typing as npt
from scipy import sparse
import copy
import meshio
import taichi as ti
ti.init(arch=ti.cpu, debug=True, default_fp=ti.f64)

script_dir = os.path.dirname(os.path.abspath(__file__))         # 获取脚本文件所在的绝对路径
os.chdir(script_dir)                                            # 改变当前工作目录到脚本文件所在目录

root_path = os.path.abspath(os.path.join(script_dir, '..'))
sys.path.append(root_path)
from SOFACode._DiffPD2D import SoftObject2D, line_from_points_2d, compress_vectors
from Utilize.GenMsh import read_mshv2_triangle, mesh_obj_tri, write_mshv2_tri


def delete_shape_files(folder):
    # Construct a pattern that matches files like "shape_0000.vtu", "shape_0001.vtu", etc.
    pattern = os.path.join(folder, "shape_[0-9][0-9][0-9][0-9].vtu")

    # Find all files in the folder that match the pattern
    files_to_delete = glob.glob(pattern)

    for file_path in files_to_delete:
        try:
            os.remove(file_path)
            print(f"Deleted: {file_path}")
        except Exception as e:
            print(f"Failed to delete {file_path}: {e}")


def in_semi(angle, base_angle, end_angle):
    # Function to check if angle is in the semicircle [base_angle, end_angle]
    # When the interval does not wrap around 2π
    if base_angle <= end_angle:
        return base_angle <= angle <= end_angle
    # When the interval wraps around (e.g., base_angle=5.5, end_angle=2.64)
    else:
        return angle >= base_angle or angle <= end_angle


def angle_diff(a, b):
    # Compute the minimal angular difference to each boundary.
    diff = (a - b) % (2*np.pi)
    return min(diff, 2*np.pi - diff)


def project_vector(vec:npt.NDArray, base_angle:float):
    """
    Project a single vector if its angle is outside the semicircle
    starting at base_angle and spanning π radians.
    """
    x, y = vec
    norm = np.linalg.norm(vec)
    # Handle zero-length vector: leave it unchanged.
    if norm == 0:
        return vec

    # Compute the vector's angle in [0, 2π)
    angle = np.arctan2(y, x) % (2*np.pi)

    # Normalize base_angle to [0, 2π)
    base_angle = base_angle % (2*np.pi)
    # Compute the end of the semicircle
    end_angle = (base_angle + np.pi) % (2*np.pi)

    # If the vector's angle is within the semicircle, return the original vector.
    if in_semi(angle, base_angle, end_angle):
        return vec
    else:
        diff_to_base = angle_diff(angle, base_angle)
        diff_to_end = angle_diff(angle, end_angle)

        # Select the boundary that is closest in angular distance.
        proj_angle = base_angle if diff_to_base < diff_to_end else end_angle
        # Return the projected vector with original norm.
        proj_vec = np.array([np.cos(proj_angle), np.sin(proj_angle)])

        return proj_vec.dot(vec) * proj_vec


def truncate_vec(arr:npt.NDArray, base_angle:list):
    """
    Given an Nx2 array `arr` of 2D vectors and a base angle (rad),
    project any vector not within the semicircle [base_angle, base_angle+π]
    onto the closest boundary of that semicircle.
    """
    projected = np.empty_like(arr)
    # Process each row individually.
    for i in range(arr.shape[0]):
        # Compute the angle of the vector.
        vec_angle = base_angle[i] * np.pi / 180.
        projected[i, :] = project_vector(arr[i,:], vec_angle)
    return projected


def convert_node_indice(old_node_num, domain_length=0.1, old_res=0.01, new_res=0.005):
    # Compute the number of nodes in one row for each grid.
    # We add 1 because the grid goes from 0 to domain_length inclusive.
    old_n = int(domain_length / old_res) + 1  # e.g., 11
    new_n = int(domain_length / new_res) + 1  # e.g., 21

    # Find the x (column) and y (row) indices in the original grid.
    i_old = old_node_num % old_n
    j_old = old_node_num // old_n

    # Compute the corresponding indices in the new grid.
    # Since the new resolution is twice as fine, each old index multiplies by factor 2.
    i_new = i_old * int(old_res / new_res)  # or simply 2 * i_old
    j_new = j_old * int(old_res / new_res)  # or simply 2 * j_old

    # Compute the new serial number (using X-first order)
    new_node_num = i_new + j_new * new_n
    return new_node_num


def createScene(root, contact:list):
    root.addObject('RequiredPlugin', pluginName=['Sofa.Component',
                                                 'Sofa.Component.Collision',
                                                 'Sofa.Component.Constraint.Projective',
                                                 'Sofa.Component.IO.Mesh',
                                                 'Sofa.Component.LinearSolver',
                                                 'Sofa.GL.Component.Rendering3D'])

    root.dt = 0.01
    root.bbox = [[-0.1, -0.1, 0.], [0.2, 0.2, 0.1]]
    root.gravity = [0., 0., 0.]
    root.addObject('VisualStyle', displayFlags='showBehaviorModels showVisual showForceFields showInteractionForceFields showWireframe')

    root.addObject('DefaultAnimationLoop', )
    root.addObject('CollisionPipeline', depth="6", verbose="0", draw="0")
    root.addObject('BruteForceBroadPhase', )
    root.addObject('BVHNarrowPhase', )
    root.addObject('NewProximityIntersection', name="Proximity", alarmDistance="0.5", contactDistance="0.2")
    root.addObject('CollisionResponse', name="Response", response="PenalityContactForceField")

    # FEM的设置
    # root.addObject('FreeMotionAnimationLoop')
    # root.addObject('GenericConstraintSolver', tolerance=1e-9, maxIterations=200)

    # root.addObject('CollisionPipeline', name='Pipeline', verbose='0')
    # root.addObject('BruteForceBroadPhase', name='BroadPhase')
    # root.addObject('BVHNarrowPhase', name='NarrowPhase')
    # root.addObject('CollisionResponse', name='Response', response='PenalityContactResponse')
    # root.addObject('MinProximityIntersection', name='Proximity', alarmDistance=0.8, contactDistance=0.5)

    obj = root.addChild('object')
    # Rayleigh阻尼影响了软体振动
    obj.addObject('EulerImplicitSolver', name='odesolver', rayleighStiffness='0.1', rayleighMass='0.1')
    obj.addObject('CGLinearSolver', name='linearsolver', iterations='200', tolerance='1.e-9', threshold='1.e-9')

    # obj.addObject('MeshVTKLoader', name='loader', filename='trian.vtk', scale='1', flipNormals='0')
    obj.addObject('MeshGmshLoader', name='loader', filename='Mesh/shape_split.msh', scale='1', flipNormals='0')
    obj.addObject('MechanicalObject', src='@loader', name='dofs', template='Vec3', translation2=[0., 0., 0.], scale3d=[1.]*3)
    obj.addObject('TriangleSetTopologyContainer', src='@loader', name='container')
    obj.addObject('TriangleSetTopologyModifier', name='modifier')
    obj.addObject('TriangleSetGeometryAlgorithms', name='geomalgo')#, tempate='Vec3')
    obj.addObject('DiagonalMass', name='mass', totalMass='0.1')#, massDensity='0.1')

    X_EPS = 5.e-3
    obj.addObject('BoxROI', name='box', box=f"-0.1 {-X_EPS} -0.1 0.11 {X_EPS} 0.1")
    obj_fixed = obj.addObject('FixedConstraint', name='fixed', indices='@box.indices')

    obj.addObject('MeshSpringForceField', name="springs", trianglesStiffness=90, trianglesDamping=0.3)
    # obj.addObject('TriangularFEMForceField', name='FEM', youngModulus='5.e2', poissonRatio='0.3', method='large')
    obj.addObject('TriangleCollisionModel')
    # obj.addObject('UncoupledConstraintCorrection', defaultCompliance="0.001")

    # Need change the indices to be equal with manipualtion index ######################################################
    # obj.addObject('LinearMovementConstraint', name='cnt1', template="Vec3", indices=[10])
    # obj.addObject('LinearMovementConstraint', name='cnt2', template="Vec3", indices=[11])

    obj_move_list = []
    for q_i in contact:
        obj_move_list.append(obj.addObject('LinearMovementConstraint', name='cnt'+str(q_i), template="Vec3", indices=[q_i]))

    # 输出Sofa设置信息
    # Sofa.msg_info("Scene", f"Contact indices: {obj_linear_move.indices.value}")
    # Sofa.msg_info("User", f"Fixed indices: {obj_fixed.indices.value}")

    return obj, obj_move_list


def add_move(handle_list:list, dt:float, movement:npt.NDArray):
    """ Use `LinearMovemetConstraint` to add a simulation step-wise movement
    Args:
        handle: The node of the object
        dt: The time step
        movement: The additional movement
    """
    if movement.shape[1] == 2:
        movement = np.concatenate((movement, np.zeros((movement.shape[0], 1))), axis=1)
    for i, handle in enumerate(handle_list):
        times_array = handle.findData('keyTimes').value
        movements_array = handle.findData('movements').value

        last_time = times_array[-1]
        last_movement = movements_array[-1, :]

        handle.findData('keyTimes').value = np.append(times_array, last_time + dt)
        handle.findData('movements').value = np.append(movements_array, [movement[i,:] + last_movement], axis=0)


def get_marker_pos(handle, marker_idx:list)->npt.NDArray:
    """从sofa中获取指定节点的位置
    """
    marker_pos = np.zeros((len(marker_idx), 3))
    # node_pos = handle.findData('position').value
    for i, idx in enumerate(marker_idx):
        pos_tmp = copy.deepcopy(handle.findData('position').value[idx])
        marker_pos[i] = pos_tmp
    return marker_pos


def save_vtu(mesh_file:str, pos:npt.NDArray, write_name:str):
    """Save the node position to a .vtu file

    Args:
        mesh_file (str): The initial mesh file name
        pos (npt.NDArray): The node position
        write_name (istrnt): The write file name
    """
    _, triangles = read_mshv2_triangle(mesh_file)

    cells_write = [("triangle", triangles)]
    mesh = meshio.Mesh(points=pos, cells=cells_write)
    mesh.write(f"data/{write_name}")


class MyObject(SoftObject2D):
    def __init__(self, shape, fix, contact, dots_list, E, nu, dt, density, **kwargs):
        super().__init__(shape, fix, contact, E, nu, dt, density, **kwargs)
        self.loss = 0.
        self.dots_idx = dots_list
        dots_num = len(dots_list)
        self.dot_pos = ti.Vector.field(2, dtype=ti.f64, shape=dots_num)
        self.dot_pos_init = ti.Vector.field(2, dtype=ti.f64, shape=dots_num)

        print(f"Marker index: {self.dots_idx}")

        self.line_params = self.construct_line()


    def construct_line(self):
        for i, idx in enumerate(self.dots_idx):
            self.dot_pos_init[i] = self.node_pos_init[idx]

        pos1, pos2 = self.dot_pos_init[0].to_numpy(), self.dot_pos_init[1].to_numpy()
        line_params = line_from_points_2d(pos1, pos2)

        return line_params


    def update_dot_pos(self):
        for i, idx in enumerate(self.dots_idx):
            self.dot_pos[i] = self.node_pos[idx]


    def construct_L_sofa(self, dot_sofa:npt.NDArray, factor:float):
        """将两个标记点拉伸到指定间距
        """
        self.dL_dq_contact.fill(0.)
        if len(self.dots_idx) != 2:
            raise ValueError("The number of marker is not 2")
        else:
            idx1, idx2 = self.dots_idx
        pos1, pos2 = dot_sofa[:,:2]         # sofa中是三维坐标
        dis_tmp = np.linalg.norm(pos1 - pos2)
        dis_desired = np.linalg.norm(
            self.node_pos_init[idx1].to_numpy() - self.node_pos_init[idx2].to_numpy()
            ) * factor

        a, b, c = self.line_params
        line_normal = np.array([a, b], dtype=np.float64)

        # 两个点到直线的距离
        line_distance1 = line_normal.dot(pos1) + c
        line_distance2 = line_normal.dot(pos2) + c

        loss = (dis_tmp - dis_desired) ** 2 + line_distance1 ** 2 + line_distance2 ** 2
        grad1 = 2*(dis_tmp - dis_desired) * (pos1 - pos2) / dis_tmp + line_distance1 * line_normal
        grad2 = 2*(dis_tmp - dis_desired) * (pos2 - pos1) / dis_tmp + line_distance2 * line_normal

        self.dL_dq_contact[idx1*2]     = grad1[0]
        self.dL_dq_contact[idx1*2 + 1] = grad1[1]
        self.dL_dq_contact[idx2*2]     = grad2[0]
        self.dL_dq_contact[idx2*2 + 1] = grad2[1]

        return dis_tmp, loss


    def compute_dcontact(self, dot_sofa:npt.NDArray):
        """ \partial L / \partial y with contact action, 计算关于contact的导数, 用于控制
        """
        dist_tmp, loss_tmp = self.construct_L_sofa(dot_sofa, 1.05)
        self.construct_g_hessian()
        self.compute_z(10)

        print(f"Distance: {dist_tmp}; Loss: {loss_tmp}")

        z_np = self.z.to_numpy()
        self.dy_contact = np.multiply(z_np, self.dx_const.to_numpy())
        return loss_tmp


@ti.data_oriented
class SofaObject:
    def __init__(self, points:npt.NDArray, triangles:npt.NDArray):
        self.points_num = points.shape[0]
        self.triangles_num = triangles.shape[0]

        self.node_pos = ti.Vector.field(2, dtype=ti.f64, shape=self.points_num)
        self.node_pos_init = ti.Vector.field(2, dtype=ti.f64, shape=self.points_num)
        self.node_pos.from_numpy(points[:,:2])
        self.node_pos_init.from_numpy(points[:,:2])

        self.triangles = ti.Vector.field(3, dtype=ti.i32, shape=self.triangles_num)
        self.Xg_inv = ti.Matrix.field(2, 2, dtype=ti.f64, shape=self.triangles_num)
        self.stretch_energy = ti.field(dtype=ti.f64, shape=self.triangles_num)
        self.triange_area = ti.field(dtype=ti.f64, shape=self.triangles_num)
        self.triangles.from_numpy(triangles)

        self.compute_area()
        self.construct_Xg_inv()


    @ti.kernel
    def compute_area(self):
        for f_i in range(self.triangles_num):
            ia, ib, ic = self.triangles[f_i]
            qa, qb, qc = self.node_pos_init[ia], self.node_pos_init[ib], self.node_pos_init[ic]
            self.triange_area[f_i] = 0.5 * ti.abs(((qb - qa).cross(qc - qa)))


    @ti.kernel
    def construct_Xg_inv(self):
        for i in range(self.triangles_num):
            ia, ib, ic = self.triangles[i]
            a = ti.Vector([self.node_pos_init[ia].x, self.node_pos_init[ia].y])
            b = ti.Vector([self.node_pos_init[ib].x, self.node_pos_init[ib].y])
            c = ti.Vector([self.node_pos_init[ic].x, self.node_pos_init[ic].y])
            B_i_inv = ti.Matrix.cols([b - a, c - a])
            self.Xg_inv[i] = B_i_inv.inverse()


    @ti.kernel
    def construct_rhs_stretch(self):
        for f_i in range(self.triangles_num):
            idx1, idx2, idx3 = self.triangles[f_i]
            a, b, c = self.node_pos[idx1], self.node_pos[idx2], self.node_pos[idx3]
            X_f = ti.Matrix.cols([b - a, c - a])
            F_i = ti.cast(X_f @ self.Xg_inv[f_i], ti.f64)

            U, sig, V = ti.svd(F_i, ti.f64)
            self.stretch_energy[f_i] = 0.5 * self.triange_area[f_i] * ((sig[0,0]-1.)**2 + (sig[1,1]-1.)**2)


def main(contact_list:List[int], marker_list:List[int]):
    # contact_sofa = [399, 420, 421, 439, 440, 419]
    # contact_sofa = [231, 252, 273, 439, 440, 419]
    # contact_list = [66, 120]
    # marker_sofa = [346, 390]
    # marker_list = [93, 105]

    contact_angle = {11:90, 22:90, 33:90, 44:90, 55:90, 66:90, 77:90, 88:90, 99:90,
                    21:-90, 32:-90, 43:-90, 54:-90, 65:-90, 76:-90, 87:-90, 98:-90, 109:-90,
                    111:0, 112:0, 113:0, 114:0, 115:0, 116:0, 117:0, 118:0, 119:0}

    shape = [0.1, 0.1]
    fix = range(11)
    gain = 5.e2

    # 生成sofa中对应的网格节点序号
    contact_sofa_list, marker_sofa_list, angle_list = [], [], []
    for contact in contact_list:
        angle_list.append(contact_angle[contact])
        contact_sofa2 = convert_node_indice(contact)
        if contact_angle[contact] == 90 or contact_angle[contact] == -90:
            contact_sofa1, contact_sofa3 = contact_sofa2 - 21, contact_sofa2 + 21
        elif contact_angle[contact] == 0:
            contact_sofa1, contact_sofa3 = contact_sofa2 - 1, contact_sofa2 + 1
        else:
            print("Error of contact indice.")
        contact_sofa_list += [contact_sofa1, contact_sofa2, contact_sofa3]

    for marker in marker_list:
        marker_sofa_list.append(convert_node_indice(marker))
    # print(contact_sofa, marker_sofa)

    node_np, _, ele_np = mesh_obj_tri(shape, 0.01/2)
    write_mshv2_tri("Mesh/shape_split.msh", node_np, ele_np)

    root = Sofa.Core.Node('root')
    _, move_handle = createScene(root, contact_sofa_list)
    Sofa.Simulation.init(root)

    soft_sofa = SofaObject(node_np, ele_np)

    dt = root.dt.value
    obj = root.getChild('object')
    dofs = obj.getObject('dofs')

    params = {"E": 1.e4, "nu": 0.4, "dt": 0.01, "density": 10.e2}
    soft = MyObject(shape, fix, contact_list, marker_list, **params)
    soft.precomputation()
    lhs_np = soft.lhs.to_numpy()
    s_lhs_np = sparse.csc_matrix(lhs_np)
    soft.pre_fact_lhs_solve = sparse.linalg.factorized(s_lhs_np)

    # 两个接触点不能太近
    contact_pos_init = soft.node_pos_init.to_numpy()[contact_list, :]
    contact_distance = np.linalg.norm(contact_pos_init[0] - contact_pos_init[1])
    if contact_distance <= 0.02 + 0.001:
        print("Contact distance is too small, please check the contact points.")
        return

    delete_shape_files('data')

    for step in range(200):
        print(f"Time Step: {step} ======================================")
        dots_pos_sofa_new = get_marker_pos(dofs, marker_sofa_list)
        # print(f'Detected marker position: {dots_pos_sofa_new.flatten()}')

        sofa_pos_tmp = dofs.findData('position').value
        soft_sofa.node_pos.from_numpy(sofa_pos_tmp[:,:2])
        soft_sofa.construct_rhs_stretch()
        save_vtu('Mesh/shape_split.msh', sofa_pos_tmp, f'shape_{step:04d}.vtu')

        soft.substep(step)
        loss_tmp = soft.compute_dcontact(dots_pos_sofa_new[:,:2])
        if loss_tmp < 2.e-7:
            break

        soft.update_dot_pos()
        # print(f"Model marker position: {soft.dot_pos.to_numpy().flatten()}")

        dy_dcontact = soft.dy_contact.reshape(-1, 2)        # reshape到与接触点个数相同
        end_speed = -gain * dy_dcontact[soft.contact_particle_list]
        end_speed_compress = compress_vectors(end_speed, 0.02)
        trunc_vec = truncate_vec(end_speed_compress, [angle/180*np.pi for angle in angle_list])
        soft.contact_vel.from_numpy(trunc_vec)

        print(f"End speed: {trunc_vec.flatten()}")
        # print(f"Model Deformation Strain: {soft.stretch_energy.to_numpy().sum():e}")
        # print(f"Sofa Defomation Strain: {soft_sofa.stretch_energy.to_numpy().sum():e}")

        add_move(move_handle, dt, np.repeat(trunc_vec * dt, 3, axis=0))
        Sofa.Simulation.animate(root, dt)

    print(f"Last loss: {loss_tmp}")
    print(f"Final Model deform strain: {soft.stretch_energy.to_numpy().sum():e}")
    print(f"Final deform strain: {soft_sofa.stretch_energy.to_numpy().sum():e}")


if __name__ == "__main__":
    parser = argparse.ArgumentParser(description="Run Contact Optimal Selection")
    parser.add_argument("--contact", type=int, nargs='+', required=True, help="Contact points")
    parser.add_argument("--marker", type=int, nargs='+', required=True, help="Marker points")
    args = parser.parse_args()

    main(args.contact, args.marker)
    # main([99, 117], [103, 104])
