"""
使用liver.msh作为几何网格文件,控制降采样后的节点,以到达期望位置，并记录该节点的位置
created at 2024-09-19 by hsy
"""

import Sofa
import SofaRuntime
import Sofa.Gui
import Sofa.SofaGL
import os
import numpy as np
import numpy.typing as npt
import copy
from DiffPDModelLiver import *


script_dir = os.path.dirname(os.path.abspath(__file__))         # 获取脚本文件所在的绝对路径
os.chdir(script_dir)                                            # 改变当前工作目录到脚本文件所在目录

# POINTS_NUM = 1

def action_compress(vec:npt.NDArray, max_length:float=3.e-4)->npt.NDArray:
    """
    Compress action vector in a safe range
    """
    length = np.linalg.norm(vec)

    if length > max_length:
        factor = max_length / length
        return vec * factor
    else:
        return vec


def createScene(root):
    root.addObject('RequiredPlugin', pluginName=['Sofa.Component',
                                                 'Sofa.Component.Collision',
                                                 'Sofa.Component.Constraint.Projective',
                                                 'Sofa.Component.IO.Mesh',
                                                 'Sofa.Component.LinearSolver',
                                                 'Sofa.GL.Component.Rendering3D'])

    root.dt = 0.01
    root.bbox = [[-0.1, -0.1, 0], [0.2, 0.2, 0.2]]
    root.gravity = [0, 0, 0]

    # root.addObject('VisualStyle', displayFlags='showBehaviorModels showVisual showForceFields showInteractionForceFields showWireframe')
    root.add('VisualStyle', displayFlags='showVisual showBehaviorModels')
    root.addObject('FreeMotionAnimationLoop')
    root.addObject('GenericConstraintSolver', tolerance=1e-9, maxIterations=200)

    root.addObject('CollisionPipeline', name='Pipeline', verbose='0')
    root.addObject('BruteForceBroadPhase', name='BroadPhase')
    root.addObject('BVHNarrowPhase', name='NarrowPhase')
    root.addObject('CollisionResponse', name='Response', response='PenalityContactResponse')
    root.addObject('MinProximityIntersection', name='Proximity', alarmDistance=0.8, contactDistance=0.5)

    obj = root.addChild('object')
    obj.addObject('EulerImplicitSolver', name='odesolver', rayleighStiffness='0.5', rayleighMass='0.5')
    obj.addObject('CGLinearSolver', name='linearsolver', iterations='200', tolerance='1.e-9', threshold='1.e-9')

    obj.addObject('MeshGmshLoader', name='loader', filename='Mesh/liver.msh', scale='0.05', flipNormals='0')
    obj.addObject('MechanicalObject', src='@loader', name='dofs', template='Vec3', translation2=[0., 0., 0.], scale3d=[1.]*3)
    obj.addObject('TetrahedronSetTopologyContainer', src='@loader', name='container')
    obj.addObject('TetrahedronSetTopologyModifier', name='modifier')
    obj.addObject('TetrahedronSetGeometryAlgorithms', name='geomalgo')#, tempate='Vec3')
    obj.addObject('DiagonalMass', name='mass', totalMass='0.01')#, massDensity='0.1')

    obj_fixed = obj.addObject('FixedConstraint', name='fixed', indices='3 39 64')
    obj_fixed.drawSize = 0.005

    obj.addObject('TetrahedronFEMForceField', name='FEM', youngModulus='5.e4', poissonRatio='0.45', method='large')
    obj.addObject('TriangleCollisionModel')
    # obj.addObject('LinearSolverConstraintCorrection', solverName='@linearsolver')
    obj.addObject('UncoupledConstraintCorrection', defaultCompliance="0.001")

    obj_linear_move = obj.addObject('LinearMovementConstraint', name='cnt', template="Vec3", indices=[85])

    visu = obj.addChild('visual')
    visu.addObject('MeshOBJLoader', name='loader', filename='Mesh/liver-smooth.obj', scale='0.05', flipNormals='0')
    visu.addObject('OglModel', name='visual_model', src='@loader', color=[1, 0, 0, 1])
    visu.addObject('BarycentricMapping', name='visual_mapping', input='@../dofs', output='@visual_model')

    surf = obj.addChild('surface')


def add_move(handle, dt, movement):
    """
    Use `LinearMovemetConstraint` to add a simulation step-wise movement
    :param handle: The node of the object
    :param dt:
    :param movement: The additional movement
    :return:
    """
    times_array = handle.findData('keyTimes').value
    movements_array = handle.findData('movements').value

    last_time = times_array[-1]
    last_movement = movements_array[-1, :]

    handle.findData('keyTimes').value = np.append(times_array, last_time + dt)
    handle.findData('movements').value = np.append(movements_array, [movement + last_movement], axis=0)


def get_marker_pos(handle, marker_idx):
    marker_pos = np.zeros((len(marker_idx), 3))
    # node_pos = handle.findData('position').value
    for i, idx in enumerate(marker_idx):
        pos_tmp = copy.deepcopy(handle.findData('position').value[idx])
        marker_pos[i] = pos_tmp
    return marker_pos


def save_pos(handle, path):
    node_pos = handle.findData('position').value
    np.savetxt(f'{path}', node_pos, '%.6f', delimiter=',')


class MyObject(SoftObject):
    def __init__(self, shape, seed_size, file, marker_list, contact_list):
        super().__init__(shape, seed_size, file, contact_list)
        self.dt = 1. / 100
        self.dots_idx = sorted(set(marker_list) - set(self.fix_particle_list) - set(self.contact_particles_list))
        self.dot_num = len(self.dots_idx)
        self.loss = ti.field(dtype=ti.f64, shape=self.dot_num)
        self.dot_pos = ti.Vector.field(3, dtype=ti.f64, shape=self.dot_num)
        self.dot_pos_init = ti.Vector.field(3, dtype=ti.f64, shape=self.dot_num)
        self.dot_pos_desired = ti.Vector.field(3, dtype=ti.f64, shape=self.dot_num)
        self.dot_error = ti.Vector.field(3, dtype=ti.f64, shape=self.dot_num)
        self.dot_sofa = ti.Vector.field(3, dtype=ti.f64, shape=self.dot_num)

        self.dL_dy_m = ti.Vector.field(3, dtype=ti.f64, shape=self.PARTICLE_NUM)
        self.read_desired_pos()


    def read_desired_pos(self):
        desired_pos = np.loadtxt(script_dir + '/Mesh/node_desired_pos.csv', delimiter=',')
        for i in range(self.dot_num):
            idx = self.dots_idx[i]
            self.dot_pos_init[i] = self.node_init_pos[idx]
            self.dot_pos[i] = self.node_init_pos[idx]
            self.dot_pos_desired[i] = desired_pos[idx]
        print(f"Initial position & Desired position:")
        for i in range(self.dot_num):
            init_pos = ''.join([f"{val:>10.6f}" for val in self.dot_pos_init[i]])
            des_pos = ''.join([f"{val:>10.6f}" for val in self.dot_pos_desired[i]])
            error_val = self.dot_pos_desired[i] - self.dot_pos_init[i]
            error = ''.join([f"{val:>10.6f}" for val in error_val])
            print(f"{self.dots_idx[i]:>3}: [{init_pos}]; [{des_pos}]; [{error}]")
        # print(f"{self.dot_pos_init.to_numpy()}")
        # print(f"Desired position: \n{self.dot_pos_desired.to_numpy()}")


    @ti.kernel
    def update_dot_pos(self):
        for i, idx in ti.static(enumerate(self.dots_idx)):
            self.dot_pos[i] = self.node_pos[idx]


    @ti.kernel
    def construct_L_sofa(self):
        dim = self.dim
        # error = np.zeros((POINTS_NUM, dim), dtype=np.float64)
        self.dL_dq.fill(0.)
        for i in range(self.dot_num):
            # idx = self.dots_idx[i]
            desired_pos = self.dot_pos_desired[i]
            current_pos = self.dot_sofa[i]
            error_ti = current_pos - desired_pos
            self.dot_error[i] = error_ti
        for i, idx in ti.static(enumerate(self.dots_idx)):
            for d in range(dim):
                self.dL_dq[idx*dim+d] += 2 * self.dot_error[i][d]

        # return error, np.linalg.norm(error, axis=1)**2


    def diff_pd(self, itr_num:int):
        self.partial_p()
        dA = self.rhs_dA.to_numpy()
        par_L = self.dL_dq.to_numpy()
        z_np = self.z.to_numpy()
        for itr in ti.static(range(itr_num)):
            rhs_diff_np = dA @ z_np + par_L
            z_new_np = self.pre_fact_lhs_solve(rhs_diff_np)
            z_np = z_new_np
        self.z.from_numpy(z_np)


    @ti.kernel
    def compute_grad_y(self):
        for idx in range(self.PARTICLE_NUM):
            idx1, idx2, idx3 = idx*self.dim, idx*self.dim+1, idx*self.dim+2
            self.dL_dy_m[idx][0] = self.z[idx1] * self.dx_const[idx1]
            self.dL_dy_m[idx][1] = self.z[idx2] * self.dx_const[idx2]
            self.dL_dy_m[idx][2] = self.z[idx3] * self.dx_const[idx3]


    def substep(self, step_num:int):
        self.construct_sn()
        self.warm_start()
        for itr in ti.static(range(self.solve_iteration)):
            self.local_solve()
            self.construct_rhs()
            rhs_np = self.rhs.to_numpy()
            node_pos_new_np = self.pre_fact_lhs_solve(rhs_np)
            self.update_pos_new(node_pos_new_np)

        self.update_vel_pos()
        self.update_dot_pos()


    def actuate_action(self, contact_speed):
        self.contact_vel[0] = contact_speed


    def compute_gradient(self, dot_sofa:npt.NDArray):
        # error, loss_tmp = self.construct_L_sofa(dot_sofa)
        self.dot_sofa.from_numpy(dot_sofa)
        self.construct_L_sofa()
        error_np = self.dot_error.to_numpy()
        loss_tmp = np.linalg.norm(error_np, axis=1)**2
        self.loss.from_numpy(loss_tmp)
        self.diff_pd(10)
        self.compute_grad_y()

        return loss_tmp


def main():
    contact_idx = [85]
    # marker_idx = [138]
    marker_list = [85, 89, 49, 99, 127, 132, 116, 79, 60, 63, 65, 101, 103, 0, 69, 80, 84, 123, 124, 128, 68, 1, 62, 75,
                   27, 35, 55, 66, 76, 110, 120, 20, 7, 21, 12, 11, 15, 4, 125, 53, 113, 86]
    fix_idx = [3, 39, 64]
    obj_shape = [0.1, 0.02, 0.1]          # 作为一个占位符，此处无用
    learning_rate = 3.e0

    soft_obj = MyObject(obj_shape, 0.01, 'Mesh/liver.msh', marker_list, contact_idx)
    soft_obj.precomputation()
    lhs_np = soft_obj.lhs.to_numpy()
    s_lhs_np = sparse.csr_matrix(lhs_np)
    soft_obj.pre_fact_lhs_solve = sparse.linalg.factorized(s_lhs_np)

    root = Sofa.Core.Node('root')
    createScene(root)
    c = root.addObject('Camera', name='c', position=[0, 1, 0], lookAt=[0, 0, 0])

    Sofa.Simulation.init(root)
    Sofa.Gui.GUIManager.Init("myscene", "qglviewer")
    Sofa.Gui.GUIManager.createGUI(root, __file__)
    Sofa.Gui.GUIManager.SetDimension(1080, 800)

    dt = root.dt.value
    obj = root.getChild('object')
    dofs = obj.getObject('dofs')
    linear_mov = obj.getObject('cnt')

    dots_pos_sofa_init = get_marker_pos(dofs, soft_obj.dots_idx)

    contact_pos_np = np.zeros((len(contact_idx), 3))
    dots_pos_sofa = dots_pos_sofa_init
    dots_pos_model = soft_obj.dot_pos.to_numpy()
    dots_sofa_list = []
    # delta_pos_list = []
    # delta_pos_model_list = []
    loss_list = []
    rob_movement_list = []
    contact_pos_list = []
    sofa_contact_pos_list = []

    for step in range(200):
        print(f"Step: {step}---------------------------------------")
        dots_pos_sofa_new = get_marker_pos(dofs, soft_obj.dots_idx)
        # print(f'Detected points position: \n{dots_pos_sofa_new}')

        # delta_pos = dots_pos_sofa_new - dots_pos_sofa
        dots_pos_sofa = dots_pos_sofa_new

        soft_obj.substep(1)
        dots_pos_model_new = soft_obj.dot_pos.to_numpy()
        # delta_pos_model = dots_pos_model_new - dots_pos_model
        dots_pos_model = copy.deepcopy(dots_pos_model_new)
        loss_tmp = soft_obj.compute_gradient(dots_pos_sofa_new)

        end_speed_np = -learning_rate * soft_obj.dL_dy_m[soft_obj.contact_particles_list[0]].to_numpy()
        end_movement_np = action_compress(end_speed_np * soft_obj.dt, 6.e-4)

        soft_obj.actuate_action(end_movement_np / soft_obj.dt)
        # print(f'Loss items: {loss_tmp}')
        print(f"Loss sum: {np.sum(loss_tmp)}")
        print(f'The tool movement: {end_movement_np.tolist()}; movement length: {np.linalg.norm(end_movement_np)}')

        add_move(linear_mov, dt, end_movement_np)
        Sofa.Simulation.animate(root, dt)

        for i, q_idx in enumerate(contact_idx):
            contact_pos_np[i, :] = copy.deepcopy(dofs.findData('position').value[q_idx])
            print(f'Contact position {q_idx}: {contact_pos_np[i, :]}')

        save_pos(dofs, script_dir + f'/data/node_end_pos{step:03d}.csv')

        # 写入数据
        dots_sofa_list.append(dots_pos_sofa.flatten())
        # delta_pos_list.append(delta_pos.flatten())
        # delta_pos_model_list.append(delta_pos_model.flatten())
        loss_list.append(loss_tmp)
        rob_movement_list.append(end_movement_np.tolist())
        contact_pos_list.append(soft_obj.node_pos[15].to_numpy())
        sofa_contact_pos_list.append(contact_pos_np.flatten())

    # np.savetxt('dots_sofa_list.csv', np.array(dots_sofa_list), fmt='%.10f', delimiter=',')
    # # np.savetxt('delta_pos_list.csv', np.array(delta_pos_list), fmt='%.10f', delimiter=',')
    # # np.savetxt('delta_pos_model_list.csv', np.array(delta_pos_model_list), fmt='%.10f', delimiter=',')
    # np.savetxt('loss_list.csv', np.array(loss_list), fmt='%.10f', delimiter=',')
    # np.savetxt('rob_movement_list.csv', np.array(rob_movement_list), fmt='%.10f', delimiter=',')
    # np.savetxt('contact_pos_list.csv', np.array(contact_pos_list), fmt='%.10f', delimiter=',')
    # np.savetxt('sofa_contact_pos_list.csv', np.array(sofa_contact_pos_list), fmt='%.10f', delimiter=',')
    # save_pos(dofs, script_dir + '/node_end_pos.csv')

    # Sofa.Gui.GUIManager.MainLoop(root)
    # Sofa.Gui.GUIManager.closeGUI()
    # print("End of simulation.")

if __name__ == '__main__':
    main()
